<?xml version="1.0"?>
<Node name="Root" gravity="0 0 0" time="0" animate="0">

    <Node name="Plugins">
        <RequiredPlugin name="SofaDiff" pluginName="SofaDiff"/>
        <RequiredPlugin name="Sofa.Component.LinearSolver.Iterative"/> <!-- Needed to use components [CGLinearSolver] -->
        <RequiredPlugin name="Sofa.Component.ODESolver.Backward"/> <!-- Needed to use components [NewtonRaphsonSolver, StaticSolver] -->
        <RequiredPlugin name="Sofa.Component.StateContainer"/> <!-- Needed to use components [MechanicalObject] -->
        <RequiredPlugin name="Sofa.Component.Mass"/> <!-- Needed to use components [UniformMass] -->
        <RequiredPlugin name="Sofa.Component.Mapping.NonLinear"/> <!-- Needed to use components [RigidMapping] -->
    </Node>

    <DefaultAnimationLoop/>
    <GradientDescentController name="controller"/>

    <Node name="DOFs">
        <NewtonRaphsonSolver name="newton" maxNbIterationsNewton="100" maxNbIterationsLineSearch="1" warnWhenLineSearchFails="false"/>
        <StaticSolver newtonSolver="@newton" name="static"/>
        <CGLinearSolver template="GraphScattered" name="linear solver" printLog="0" iterations="25" tolerance="1e-5" threshold="1e-5"/>

        <MechanicalObject template="Rigid3d" name="dofs" position="0 0 0  0 0 0 1"/>
		<UniformMass template="Rigid3d" name="uniformMass" totalMass="1.0"/>

        <Node name="Endpoint">
            <MechanicalObject template="Vec3d" name="endpoint_mo" position="0.2 0.1 0.1"/>
            <RigidMapping input="@.."/>
        </Node>
    </Node>

    <Node name="Error">
        <MechanicalObject template="Vec1d" name="error" position="0"/>
        <DistanceToPlaneCost template="Vec3d" input="@../DOFs/Endpoint" planeNormal="2 0 0" planePoint="0 0 0"/>
    </Node>
</Node>
